// SBML level 3 version 1

model valid_53()
  // valid_53 translated by MOCCASIN

  // Compartments:
  compartment compartmentOne = 1;

  // Species:
  species SimData_1 in compartmentOne = 1;
  species SimData_2 in compartmentOne = 1;
  species SimData_3 in compartmentOne = 1;
  species newVar1 in compartmentOne = 0;
  species newVar2 in compartmentOne = 0;
  species newVar3 in compartmentOne = 0;

  // Parameters:
  I = 1;
  k_1 = 4.2416;
  k_2 = 5.9816;
  k_3 = 0.1009;
  k_4 = 1.1549;
  k_5 = 1.3618;
  k_6 = 1.4219;
  k_7 = 0.0051;
  k_8 = 0.0972;
  k_9 = 0.0012;
  k_10 = 56.8583;
  k_11 = 0.0111;
  k_12 = 0.0014;

  // Reactions:
  J1: SimData_1 => newVar1; SimData_1*(k_2/(SimData_1 + k_8));
  J2: newVar1 => SimData_1; newVar1*k_1*(I/(newVar1 + k_7));
  J3: SimData_2 => newVar2; SimData_2*(k_4/(SimData_2 + k_10));
  J4: SimData_1 + newVar2 => SimData_1 + SimData_2; newVar2*SimData_1*(k_3/(newVar2 + k_9));
  J5: SimData_2 + SimData_3 => SimData_2 + newVar3; SimData_2*SimData_3*(k_6/(SimData_3 + k_12));
  J6: SimData_1 + newVar3 => SimData_1 + SimData_3; newVar3*SimData_1*(k_5/(k_11 + newVar3));
end
