// SBML level 2 version 1

model algebraicRules_basic()

  // Compartments:
  compartment cell = 1;

  // Species:
  species x in cell;

  // Parameters:
  k has metre;
  k1 has metre;
  k2 has m_per_sec;
  k3 has volt_sq;
  k4 = ;
  p has second;

  // Rate rules:
  x' = k && k1;
  x' = cos(1.57);
  x' = acos(0.5);
  x' = k + k1;
  x' = k^2;
  x' = k*k2;
  x' = k/k2;
  x' = piecewise(k, k2 >= 4, k1);
  x' = sqrt(2);
  x' = k4*k1;
  x' = k4 + delay(k1, 0.1);
  x' = k4*(k4 + k1);
  x' = k1 + k4;
  x' = k1*r;

  // Reactions:
  r: x => ; x*r_k/p;
    r_k = 9 litre;

  // Unit definitions:
  unit m_per_sec = metre / second;
  unit volt_sq = volt^2;
end
